*Heading
** Job name: Job-3 Model name: Model-3
** Generated by: Abaqus/CAE 6.14-2
*Preprint, echo=NO, model=NO, history=NO, contact=NO
**
** PARTS
**
*Part, name=Part-1
*Node
1,-0.054,0.294
2,-0.048,0.294
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*Element , type=T2D2
1,2,1
2,24,1
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*Elset, elset=Normal Elements
1,1730,3723,5675,7603,9553
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*Elset, elset=Weak Elements
14651,21921,25985,3191,5966,12321
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** Section: Normal
*Solid Section, elset=NORMALELEMENTS, material="Normal Elastic"
1.,
** Section: Weak
*Solid Section, elset=WEAKELEMENTS, material="Weak Elastic"
1.,
*End Part
**
**
** ASSEMBLY
**
*Assembly, name=Assembly
**
*Instance, name=PART-1-1, part=PART-1
*End Instance
*Nset, nset=ns3615, instance=PART-1-1
3615,
*Nset, nset=ns3616, instance=PART-1-1
3616,
*Nset, nset=ns3617, instance=PART-1-1
3617,
*Nset, nset=ns3713, instance=PART-1-1
3713,
*Nset, nset=ns3714, instance=PART-1-1
3714,
*Nset, nset=ns3808, instance=PART-1-1
3808,
*Nset, nset=ns3809, instance=PART-1-1
3809,
*Nset, nset=ns3902, instance=PART-1-1
3902,
*Nset, nset=ns3903, instance=PART-1-1
3903,
*Nset, nset=ns3996, instance=PART-1-1
3996,
*Nset, nset=ns3997, instance=PART-1-1
3997,
*Nset, nset=ns4091, instance=PART-1-1
4091,
*Nset, nset=ns4092, instance=PART-1-1
4092,
*Nset, nset=ns4188, instance=PART-1-1
4188,
*Nset, nset=ns4189, instance=PART-1-1
4189,
*Nset, nset=ns4190, instance=PART-1-1
4190,
*End Assembly
**
** MATERIALS
**
*Material, name="Normal Elastic"
*Hyperelastic, marlow
*Uniaxial Test Data
-0.75,-0.5
-0.7425,-0.495
-0.735,-0.49
-0.7275,-0.485
-0.72,-0.48
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7.5,0.5
**
*Material, name="Weak Elastic"
*Hyperelastic, marlow
*Uniaxial Test Data
-7.5e-07,-0.5
-7.425e-07,-0.495
-7.35e-07,-0.49
-7.275e-07,-0.485
-7.2e-07,-0.48
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7.5e-06,0.5
** ----------------------------------------------------------------
**
** STEP: Step-1
**
*Step, name=Step-1, nlgeom=YES
*Static
1., 1., 1e-05, 1.
**
** BOUNDARY CONDITIONS
** Name: BC3615 Type: Displacement/Rotation
*Boundary
ns3615, 1, 1,0.0006
ns3615, 2, 2,-0.0018
** Name: BC3616 Type: Displacement/Rotation
*Boundary
ns3616, 1, 1,0
ns3616, 2, 2,-0.0018
** Name: BC3617 Type: Displacement/Rotation
*Boundary
ns3617, 1, 1,-0.0006
ns3617, 2, 2,-0.0018
** Name: BC3713 Type: Displacement/Rotation
*Boundary
ns3713, 1, 1,0.0012
ns3713, 2, 2,-0.0012
** Name: BC3714 Type: Displacement/Rotation
*Boundary
ns3714, 1, 1,-0.0012
ns3714, 2, 2,-0.0012
** Name: BC3808 Type: Displacement/Rotation
*Boundary
ns3808, 1, 1,0.0018
ns3808, 2, 2,-0.0006
** Name: BC3809 Type: Displacement/Rotation
*Boundary
ns3809, 1, 1,-0.0018
ns3809, 2, 2,-0.0006
** Name: BC3902 Type: Displacement/Rotation
*Boundary
ns3902, 1, 1,0.0018
ns3902, 2, 2,0
** Name: BC3903 Type: Displacement/Rotation
*Boundary
ns3903, 1, 1,-0.0018
ns3903, 2, 2,0
** Name: BC3996 Type: Displacement/Rotation
*Boundary
ns3996, 1, 1,0.0018
ns3996, 2, 2,0.0006
** Name: BC3997 Type: Displacement/Rotation
*Boundary
ns3997, 1, 1,-0.0018
ns3997, 2, 2,0.0006
** Name: BC4091 Type: Displacement/Rotation
*Boundary
ns4091, 1, 1,0.0012
ns4091, 2, 2,0.0012
** Name: BC4092 Type: Displacement/Rotation
*Boundary
ns4092, 1, 1,-0.0012
ns4092, 2, 2,0.0012
** Name: BC4188 Type: Displacement/Rotation
*Boundary
ns4188, 1, 1,0.0006
ns4188, 2, 2,0.0018
** Name: BC4189 Type: Displacement/Rotation
*Boundary
ns4189, 1, 1,0
ns4189, 2, 2,0.0018
** Name: BC4190 Type: Displacement/Rotation
*Boundary
ns4190, 1, 1,-0.0006
ns4190, 2, 2,0.0018
** LOADS
**
** OUTPUT REQUESTS
**
*Restart, write, frequency=0
**
** FIELD OUTPUT: F-Output-1
**
*Output, field, variable=PRESELECT
**
** HISTORY OUTPUT: H-Output-1
**
*Output, history, variable=PRESELECT
*End Step
